*HEADING
ccxview sample: cantilever under bending, torsion, both, and pressure
*NODE, NSET=NALL
1, 0, -30, -20
2, 12.5, -30, -20
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*ELEMENT, TYPE=C3D20R, ELSET=EALL
1, 1, 2, 3, 4, 5, 6, 7, 8, 9, 10, 11, 12, 13, 14, 15,
16, 17, 18, 19, 20
2, 5, 6, 7, 8, 21, 22, 23, 24, 13, 14, 15, 16, 25, 26, 27,
28, 29, 30, 31, 32
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*NSET, NSET=NROOT
1, 4, 5, 8, 12, 16
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*NSET, NSET=NREF
3166
*SURFACE, NAME=SEND, TYPE=ELEMENT
553, S4
554, S4
555, S4
556, S4
557, S4
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576, S4
*SURFACE, NAME=STOP, TYPE=ELEMENT
21, S5
22, S5
23, S5
24, S5
45, S5
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576, S5
*MATERIAL, NAME=STEEL
*ELASTIC
210000., 0.3
*SOLID SECTION, ELSET=EALL, MATERIAL=STEEL
*COUPLING, REF NODE=3166, SURFACE=SEND, CONSTRAINT NAME=TIP
*DISTRIBUTING
1, 6
*BOUNDARY
NROOT, 1, 3
*STEP
*STATIC
*CLOAD
3166, 2, -10000.
*NODE FILE
U, RF
*EL FILE
S, E
*END STEP
*STEP
*STATIC
*CLOAD, OP=NEW
3166, 4, 2000000.
*NODE FILE
U, RF
*EL FILE
S, E
*END STEP
*STEP
*STATIC
*CLOAD, OP=NEW
3166, 1, 100000.
3166, 2, -10000.
3166, 4, 2000000.
*NODE FILE
U, RF
*EL FILE
S, E
*END STEP
*STEP
*STATIC
*CLOAD, OP=NEW
*DLOAD
STOP, P, 1.
*NODE FILE
U, RF
*EL FILE
S, E
*END STEP
