*HEADING
ccxview sample: a rocker pressed onto a plate, node to surface contact
*NODE, NSET=NALL
1, -30, -20, -12
2, -25, -20, -12
3, -20, -20, -12
4, -15, -20, -12
5, -10, -20, -12
6, -5, -20, -12
7, 0, -20, -12
8, 5, -20, -12
9, 10, -20, -12
10, 15, -20, -12
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*ELEMENT, TYPE=C3D8I, ELSET=PLATE
1, 1, 2, 15, 14, 118, 119, 132, 131
2, 2, 3, 16, 15, 119, 120, 133, 132
3, 3, 4, 17, 16, 120, 121, 134, 133
4, 4, 5, 18, 17, 121, 122, 135, 134
5, 5, 6, 19, 18, 122, 123, 136, 135
6, 6, 7, 20, 19, 123, 124, 137, 136
7, 7, 8, 21, 20, 124, 125, 138, 137
8, 8, 9, 22, 21, 125, 126, 139, 138
9, 9, 10, 23, 22, 126, 127, 140, 139
10, 10, 11, 24, 23, 127, 128, 141, 140
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*ELEMENT, TYPE=C3D8I, ELSET=ROCKER
289, 469, 470, 486, 485, 597, 598, 614, 613
290, 470, 471, 487, 486, 598, 599, 615, 614
291, 471, 472, 488, 487, 599, 600, 616, 615
292, 472, 473, 489, 488, 600, 601, 617, 616
293, 473, 474, 490, 489, 601, 602, 618, 617
294, 474, 475, 491, 490, 602, 603, 619, 618
295, 475, 476, 492, 491, 603, 604, 620, 619
296, 476, 477, 493, 492, 604, 605, 621, 620
297, 477, 478, 494, 493, 605, 606, 622, 621
298, 478, 479, 495, 494, 606, 607, 623, 622
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*NSET, NSET=NBOTTOM
1, 2, 3, 4, 5, 6, 7, 8, 9, 10, 11, 12, 13, 14, 15, 16,
17, 18, 19, 20, 21, 22, 23, 24, 25, 26, 27, 28, 29, 30, 31, 32,
33, 34, 35, 36, 37, 38, 39, 40, 41, 42, 43, 44, 45, 46, 47, 48,
49, 50, 51, 52, 53, 54, 55, 56, 57, 58, 59, 60, 61, 62, 63, 64,
65, 66, 67, 68, 69, 70, 71, 72, 73, 74, 75, 76, 77, 78, 79, 80,
81, 82, 83, 84, 85, 86, 87, 88, 89, 90, 91, 92, 93, 94, 95, 96,
97, 98, 99, 100, 101, 102, 103, 104, 105, 106, 107, 108, 109, 110, 111, 112,
113, 114, 115, 116, 117
*NSET, NSET=NTOP
1109, 1110, 1111, 1112, 1113, 1114, 1115, 1116, 1117, 1118, 1119, 1120, 1121, 1122, 1123, 1124,
1125, 1126, 1127, 1128, 1129, 1130, 1131, 1132, 1133, 1134, 1135, 1136, 1137, 1138, 1139, 1140,
1141, 1142, 1143, 1144, 1145, 1146, 1147, 1148, 1149, 1150, 1151, 1152, 1153, 1154, 1155, 1156,
1157, 1158, 1159, 1160, 1161, 1162, 1163, 1164, 1165, 1166, 1167, 1168, 1169, 1170, 1171, 1172,
1173, 1174, 1175, 1176, 1177, 1178, 1179, 1180, 1181, 1182, 1183, 1184, 1185, 1186, 1187, 1188,
1189, 1190, 1191, 1192, 1193, 1194, 1195, 1196, 1197, 1198, 1199, 1200, 1201, 1202, 1203, 1204,
1205, 1206, 1207, 1208, 1209, 1210, 1211, 1212, 1213, 1214, 1215, 1216, 1217, 1218, 1219, 1220,
1221, 1222, 1223, 1224, 1225, 1226, 1227, 1228, 1229, 1230, 1231, 1232, 1233, 1234, 1235, 1236
*SURFACE, NAME=PLATE_TOP
193, S2
194, S2
195, S2
196, S2
197, S2
198, S2
199, S2
200, S2
201, S2
202, S2
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*SURFACE, NAME=ROCKER_BOTTOM
289, S1
290, S1
291, S1
292, S1
293, S1
294, S1
295, S1
296, S1
297, S1
298, S1
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*MATERIAL, NAME=STEEL
*ELASTIC
210000., 0.3
*SOLID SECTION, ELSET=PLATE, MATERIAL=STEEL
*SOLID SECTION, ELSET=ROCKER, MATERIAL=STEEL
*SURFACE INTERACTION, NAME=STEEL_ON_STEEL
*SURFACE BEHAVIOR, PRESSURE-OVERCLOSURE=LINEAR
1000000.
*CONTACT PAIR, INTERACTION=STEEL_ON_STEEL, TYPE=NODE TO SURFACE
ROCKER_BOTTOM, PLATE_TOP
*BOUNDARY
NBOTTOM, 1, 3
NTOP, 1, 2
*STEP, INC=100
*STATIC
0.34, 1.
*BOUNDARY
NTOP, 3, 3, -0.04
*NODE FILE, CONTACT ELEMENTS
U
*EL FILE
S
*CONTACT FILE
CDIS, CSTR
*END STEP
