*HEADING
ccxview sample: a rocker pressed onto a plate, surface to surface contact
*NODE, NSET=NALL
1, -30, -20, -12
2, -25, -20, -12
3, -20, -20, -12
4, -15, -20, -12
5, -10, -20, -12
6, -5, -20, -12
7, 0, -20, -12
8, 5, -20, -12
9, 10, -20, -12
10, 15, -20, -12
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*ELEMENT, TYPE=C3D8I, ELSET=PLATE
1, 1, 2, 15, 14, 118, 119, 132, 131
2, 2, 3, 16, 15, 119, 120, 133, 132
3, 3, 4, 17, 16, 120, 121, 134, 133
4, 4, 5, 18, 17, 121, 122, 135, 134
5, 5, 6, 19, 18, 122, 123, 136, 135
6, 6, 7, 20, 19, 123, 124, 137, 136
7, 7, 8, 21, 20, 124, 125, 138, 137
8, 8, 9, 22, 21, 125, 126, 139, 138
9, 9, 10, 23, 22, 126, 127, 140, 139
10, 10, 11, 24, 23, 127, 128, 141, 140
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*ELEMENT, TYPE=C3D8I, ELSET=ROCKER
193, 352, 353, 364, 363, 396, 397, 408, 407
194, 353, 354, 365, 364, 397, 398, 409, 408
195, 354, 355, 366, 365, 398, 399, 410, 409
196, 355, 356, 367, 366, 399, 400, 411, 410
197, 356, 357, 368, 367, 400, 401, 412, 411
198, 357, 358, 369, 368, 401, 402, 413, 412
199, 358, 359, 370, 369, 402, 403, 414, 413
200, 359, 360, 371, 370, 403, 404, 415, 414
201, 360, 361, 372, 371, 404, 405, 416, 415
202, 361, 362, 373, 372, 405, 406, 417, 416
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*NSET, NSET=NBOTTOM
1, 2, 3, 4, 5, 6, 7, 8, 9, 10, 11, 12, 13, 14, 15, 16,
17, 18, 19, 20, 21, 22, 23, 24, 25, 26, 27, 28, 29, 30, 31, 32,
33, 34, 35, 36, 37, 38, 39, 40, 41, 42, 43, 44, 45, 46, 47, 48,
49, 50, 51, 52, 53, 54, 55, 56, 57, 58, 59, 60, 61, 62, 63, 64,
65, 66, 67, 68, 69, 70, 71, 72, 73, 74, 75, 76, 77, 78, 79, 80,
81, 82, 83, 84, 85, 86, 87, 88, 89, 90, 91, 92, 93, 94, 95, 96,
97, 98, 99, 100, 101, 102, 103, 104, 105, 106, 107, 108, 109, 110, 111, 112,
113, 114, 115, 116, 117
*NSET, NSET=NTOP
484, 485, 486, 487, 488, 489, 490, 491, 492, 493, 494, 495, 496, 497, 498, 499,
500, 501, 502, 503, 504, 505, 506, 507, 508, 509, 510, 511, 512, 513, 514, 515,
516, 517, 518, 519, 520, 521, 522, 523, 524, 525, 526, 527
*SURFACE, NAME=PLATE_TOP
97, S2
98, S2
99, S2
100, S2
101, S2
102, S2
103, S2
104, S2
105, S2
106, S2
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*SURFACE, NAME=ROCKER_BOTTOM
193, S1
194, S1
195, S1
196, S1
197, S1
198, S1
199, S1
200, S1
201, S1
202, S1
203, S1
204, S1
205, S1
206, S1
207, S1
208, S1
209, S1
210, S1
211, S1
212, S1
213, S1
214, S1
215, S1
216, S1
217, S1
218, S1
219, S1
220, S1
221, S1
222, S1
*MATERIAL, NAME=STEEL
*ELASTIC
210000., 0.3
*SOLID SECTION, ELSET=PLATE, MATERIAL=STEEL
*SOLID SECTION, ELSET=ROCKER, MATERIAL=STEEL
*SURFACE INTERACTION, NAME=STEEL_ON_STEEL
*SURFACE BEHAVIOR, PRESSURE-OVERCLOSURE=LINEAR
1000000.
*CONTACT PAIR, INTERACTION=STEEL_ON_STEEL, TYPE=SURFACE TO SURFACE
ROCKER_BOTTOM, PLATE_TOP
*BOUNDARY
NBOTTOM, 1, 3
NTOP, 1, 2
*STEP, INC=100
*STATIC
1., 1.
*BOUNDARY
NTOP, 3, 3, -0.024
*NODE FILE, CONTACT ELEMENTS
U
*EL FILE
S
*CONTACT FILE
CDIS, CSTR
*END STEP
