*HEADING
ccxview sample: a tilted block on a plate, a varying contact gap
*NODE, NSET=NALL
1, -15, -10, -6
2, -11.666667, -10, -6
3, -8.3333333, -10, -6
4, -5, -10, -6
5, -1.6666667, -10, -6
6, 1.6666667, -10, -6
7, 5, -10, -6
8, 8.3333333, -10, -6
9, 11.666667, -10, -6
10, 15, -10, -6
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*ELEMENT, TYPE=C3D8I, ELSET=PLATE
1, 1, 2, 12, 11, 71, 72, 82, 81
2, 2, 3, 13, 12, 72, 73, 83, 82
3, 3, 4, 14, 13, 73, 74, 84, 83
4, 4, 5, 15, 14, 74, 75, 85, 84
5, 5, 6, 16, 15, 75, 76, 86, 85
6, 6, 7, 17, 16, 76, 77, 87, 86
7, 7, 8, 18, 17, 77, 78, 88, 87
8, 8, 9, 19, 18, 78, 79, 89, 88
9, 9, 10, 20, 19, 79, 80, 90, 89
10, 11, 12, 22, 21, 81, 82, 92, 91
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*ELEMENT, TYPE=C3D8I, ELSET=BLOCK
109, 211, 212, 223, 222, 288, 289, 300, 299
110, 212, 213, 224, 223, 289, 290, 301, 300
111, 213, 214, 225, 224, 290, 291, 302, 301
112, 214, 215, 226, 225, 291, 292, 303, 302
113, 215, 216, 227, 226, 292, 293, 304, 303
114, 216, 217, 228, 227, 293, 294, 305, 304
115, 217, 218, 229, 228, 294, 295, 306, 305
116, 218, 219, 230, 229, 295, 296, 307, 306
117, 219, 220, 231, 230, 296, 297, 308, 307
118, 220, 221, 232, 231, 297, 298, 309, 308
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*NSET, NSET=NBOTTOM
1, 2, 3, 4, 5, 6, 7, 8, 9, 10, 11, 12, 13, 14, 15, 16,
17, 18, 19, 20, 21, 22, 23, 24, 25, 26, 27, 28, 29, 30, 31, 32,
33, 34, 35, 36, 37, 38, 39, 40, 41, 42, 43, 44, 45, 46, 47, 48,
49, 50, 51, 52, 53, 54, 55, 56, 57, 58, 59, 60, 61, 62, 63, 64,
65, 66, 67, 68, 69, 70
*NSET, NSET=NTOP
519, 520, 521, 522, 523, 524, 525, 526, 527, 528, 529, 530, 531, 532, 533, 534,
535, 536, 537, 538, 539, 540, 541, 542, 543, 544, 545, 546, 547, 548, 549, 550,
551, 552, 553, 554, 555, 556, 557, 558, 559, 560, 561, 562, 563, 564, 565, 566,
567, 568, 569, 570, 571, 572, 573, 574, 575, 576, 577, 578, 579, 580, 581, 582,
583, 584, 585, 586, 587, 588, 589, 590, 591, 592, 593, 594, 595
*SURFACE, NAME=PLATE_TOP
55, S2
56, S2
57, S2
58, S2
59, S2
60, S2
61, S2
62, S2
63, S2
64, S2
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*SURFACE, NAME=BLOCK_BOTTOM
109, S1
110, S1
111, S1
112, S1
113, S1
114, S1
115, S1
116, S1
117, S1
118, S1
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*MATERIAL, NAME=STEEL
*ELASTIC
210000., 0.3
*SOLID SECTION, ELSET=PLATE, MATERIAL=STEEL
*SOLID SECTION, ELSET=BLOCK, MATERIAL=STEEL
*SURFACE INTERACTION, NAME=STEEL_ON_STEEL
*SURFACE BEHAVIOR, PRESSURE-OVERCLOSURE=LINEAR
1000000., 0., 1
*FRICTION
0.3, 50000.
*CONTACT PAIR, INTERACTION=STEEL_ON_STEEL, TYPE=NODE TO SURFACE
BLOCK_BOTTOM, PLATE_TOP
*BOUNDARY
NBOTTOM, 1, 3
NTOP, 1, 2
*STEP, INC=100
*STATIC
0.34, 1.
*BOUNDARY
NTOP, 3, 3, -0.15
NTOP, 1, 1, 0.004
*NODE FILE, CONTACT ELEMENTS
U
*CONTACT FILE
CDIS, CSTR
*END STEP
