*HEADING
ccxview sample: a tilted block on a plate, a varying contact gap
*NODE, NSET=NALL
1, -15, -10, -6
2, -11.666667, -10, -6
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*ELEMENT, TYPE=C3D8I, ELSET=PLATE
1, 1, 2, 12, 11, 71, 72, 82, 81
2, 2, 3, 13, 12, 72, 73, 83, 82
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*ELEMENT, TYPE=C3D8I, ELSET=BLOCK
109, 211, 212, 223, 222, 288, 289, 300, 299
110, 212, 213, 224, 223, 289, 290, 301, 300
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*NSET, NSET=NBOTTOM
1, 2, 3, 4, 5, 6
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*NSET, NSET=NTOP
519, 520, 521, 522, 523, 524
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*SURFACE, NAME=PLATE_TOP
55, S2
56, S2
57, S2
58, S2
59, S2
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108, S2
*SURFACE, NAME=BLOCK_BOTTOM
109, S1
110, S1
111, S1
112, S1
113, S1
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168, S1
*MATERIAL, NAME=STEEL
*ELASTIC
210000., 0.3
*SOLID SECTION, ELSET=PLATE, MATERIAL=STEEL
*SOLID SECTION, ELSET=BLOCK, MATERIAL=STEEL
*SURFACE INTERACTION, NAME=STEEL_ON_STEEL
*SURFACE BEHAVIOR, PRESSURE-OVERCLOSURE=LINEAR
1000000., 0., 1
*CONTACT PAIR, INTERACTION=STEEL_ON_STEEL, TYPE=NODE TO SURFACE
BLOCK_BOTTOM, PLATE_TOP
*BOUNDARY
NBOTTOM, 1, 3
NTOP, 1, 2
*STEP, INC=100
*STATIC
0.34, 1.
*BOUNDARY
NTOP, 3, 3, -0.15
*NODE FILE, CONTACT ELEMENTS
U
*CONTACT FILE
CDIS, CSTR
*END STEP
