*HEADING
ccxview sample: five contact models, A gap B slide C lift-off D interface opening E tie
*NODE, NSET=NALL
1, -15, -10, -6
2, -11.666667, -10, -6
3, -8.3333333, -10, -6
4, -5, -10, -6
5, -1.6666667, -10, -6
6, 1.6666667, -10, -6
7, 5, -10, -6
8, 8.3333333, -10, -6
9, 11.666667, -10, -6
10, 15, -10, -6
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*ELEMENT, TYPE=C3D8I, ELSET=A_GAP_PLATE
1, 1, 2, 12, 11, 71, 72, 82, 81
2, 2, 3, 13, 12, 72, 73, 83, 82
3, 3, 4, 14, 13, 73, 74, 84, 83
4, 4, 5, 15, 14, 74, 75, 85, 84
5, 5, 6, 16, 15, 75, 76, 86, 85
6, 6, 7, 17, 16, 76, 77, 87, 86
7, 7, 8, 18, 17, 77, 78, 88, 87
8, 8, 9, 19, 18, 78, 79, 89, 88
9, 9, 10, 20, 19, 79, 80, 90, 89
10, 11, 12, 22, 21, 81, 82, 92, 91
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*ELEMENT, TYPE=C3D8I, ELSET=A_GAP_BLOCK
55, 141, 142, 153, 152, 218, 219, 230, 229
56, 142, 143, 154, 153, 219, 220, 231, 230
57, 143, 144, 155, 154, 220, 221, 232, 231
58, 144, 145, 156, 155, 221, 222, 233, 232
59, 145, 146, 157, 156, 222, 223, 234, 233
60, 146, 147, 158, 157, 223, 224, 235, 234
61, 147, 148, 159, 158, 224, 225, 236, 235
62, 148, 149, 160, 159, 225, 226, 237, 236
63, 149, 150, 161, 160, 226, 227, 238, 237
64, 150, 151, 162, 161, 227, 228, 239, 238
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*ELEMENT, TYPE=C3D8I, ELSET=B_SLIDE_PLATE
235, 449, 450, 460, 459, 519, 520, 530, 529
236, 450, 451, 461, 460, 520, 521, 531, 530
237, 451, 452, 462, 461, 521, 522, 532, 531
238, 452, 453, 463, 462, 522, 523, 533, 532
239, 453, 454, 464, 463, 523, 524, 534, 533
240, 454, 455, 465, 464, 524, 525, 535, 534
241, 455, 456, 466, 465, 525, 526, 536, 535
242, 456, 457, 467, 466, 526, 527, 537, 536
243, 457, 458, 468, 467, 527, 528, 538, 537
244, 459, 460, 470, 469, 529, 530, 540, 539
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*ELEMENT, TYPE=C3D8I, ELSET=B_SLIDE_BLOCK
289, 589, 590, 599, 598, 652, 653, 662, 661
290, 590, 591, 600, 599, 653, 654, 663, 662
291, 591, 592, 601, 600, 654, 655, 664, 663
292, 592, 593, 602, 601, 655, 656, 665, 664
293, 593, 594, 603, 602, 656, 657, 666, 665
294, 594, 595, 604, 603, 657, 658, 667, 666
295, 595, 596, 605, 604, 658, 659, 668, 667
296, 596, 597, 606, 605, 659, 660, 669, 668
297, 598, 599, 608, 607, 661, 662, 671, 670
298, 599, 600, 609, 608, 662, 663, 672, 671
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*ELEMENT, TYPE=C3D8I, ELSET=C_LIFT_PLATE
433, 841, 842, 852, 851, 911, 912, 922, 921
434, 842, 843, 853, 852, 912, 913, 923, 922
435, 843, 844, 854, 853, 913, 914, 924, 923
436, 844, 845, 855, 854, 914, 915, 925, 924
437, 845, 846, 856, 855, 915, 916, 926, 925
438, 846, 847, 857, 856, 916, 917, 927, 926
439, 847, 848, 858, 857, 917, 918, 928, 927
440, 848, 849, 859, 858, 918, 919, 929, 928
441, 849, 850, 860, 859, 919, 920, 930, 929
442, 851, 852, 862, 861, 921, 922, 932, 931
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*ELEMENT, TYPE=C3D8I, ELSET=C_LIFT_BLOCK
487, 981, 982, 993, 992, 1058, 1059, 1070, 1069
488, 982, 983, 994, 993, 1059, 1060, 1071, 1070
489, 983, 984, 995, 994, 1060, 1061, 1072, 1071
490, 984, 985, 996, 995, 1061, 1062, 1073, 1072
491, 985, 986, 997, 996, 1062, 1063, 1074, 1073
492, 986, 987, 998, 997, 1063, 1064, 1075, 1074
493, 987, 988, 999, 998, 1064, 1065, 1076, 1075
494, 988, 989, 1000, 999, 1065, 1066, 1077, 1076
495, 989, 990, 1001, 1000, 1066, 1067, 1078, 1077
496, 990, 991, 1002, 1001, 1067, 1068, 1079, 1078
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*ELEMENT, TYPE=C3D8I, ELSET=D_LAM_BOTTOM
667, 1291, 1292, 1308, 1307, 1339, 1340, 1356, 1355
668, 1292, 1293, 1309, 1308, 1340, 1341, 1357, 1356
669, 1293, 1294, 1310, 1309, 1341, 1342, 1358, 1357
670, 1294, 1295, 1311, 1310, 1342, 1343, 1359, 1358
671, 1295, 1296, 1312, 1311, 1343, 1344, 1360, 1359
672, 1296, 1297, 1313, 1312, 1344, 1345, 1361, 1360
673, 1297, 1298, 1314, 1313, 1345, 1346, 1362, 1361
674, 1298, 1299, 1315, 1314, 1346, 1347, 1363, 1362
675, 1299, 1300, 1316, 1315, 1347, 1348, 1364, 1363
676, 1300, 1301, 1317, 1316, 1348, 1349, 1365, 1364
677, 1301, 1302, 1318, 1317, 1349, 1350, 1366, 1365
678, 1302, 1303, 1319, 1318, 1350, 1351, 1367, 1366
679, 1303, 1304, 1320, 1319, 1351, 1352, 1368, 1367
680, 1304, 1305, 1321, 1320, 1352, 1353, 1369, 1368
681, 1305, 1306, 1322, 1321, 1353, 1354, 1370, 1369
682, 1307, 1308, 1324, 1323, 1355, 1356, 1372, 1371
683, 1308, 1309, 1325, 1324, 1356, 1357, 1373, 1372
684, 1309, 1310, 1326, 1325, 1357, 1358, 1374, 1373
685, 1310, 1311, 1327, 1326, 1358, 1359, 1375, 1374
686, 1311, 1312, 1328, 1327, 1359, 1360, 1376, 1375
687, 1312, 1313, 1329, 1328, 1360, 1361, 1377, 1376
688, 1313, 1314, 1330, 1329, 1361, 1362, 1378, 1377
689, 1314, 1315, 1331, 1330, 1362, 1363, 1379, 1378
690, 1315, 1316, 1332, 1331, 1363, 1364, 1380, 1379
691, 1316, 1317, 1333, 1332, 1364, 1365, 1381, 1380
692, 1317, 1318, 1334, 1333, 1365, 1366, 1382, 1381
693, 1318, 1319, 1335, 1334, 1366, 1367, 1383, 1382
694, 1319, 1320, 1336, 1335, 1367, 1368, 1384, 1383
695, 1320, 1321, 1337, 1336, 1368, 1369, 1385, 1384
696, 1321, 1322, 1338, 1337, 1369, 1370, 1386, 1385
*ELEMENT, TYPE=C3D8I, ELSET=D_LAM_TOP
697, 1387, 1388, 1413, 1412, 1487, 1488, 1513, 1512
698, 1388, 1389, 1414, 1413, 1488, 1489, 1514, 1513
699, 1389, 1390, 1415, 1414, 1489, 1490, 1515, 1514
700, 1390, 1391, 1416, 1415, 1490, 1491, 1516, 1515
701, 1391, 1392, 1417, 1416, 1491, 1492, 1517, 1516
702, 1392, 1393, 1418, 1417, 1492, 1493, 1518, 1517
703, 1393, 1394, 1419, 1418, 1493, 1494, 1519, 1518
704, 1394, 1395, 1420, 1419, 1494, 1495, 1520, 1519
705, 1395, 1396, 1421, 1420, 1495, 1496, 1521, 1520
706, 1396, 1397, 1422, 1421, 1496, 1497, 1522, 1521
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*ELEMENT, TYPE=C3D8I, ELSET=E_TIE_BASE
769, 1587, 1588, 1595, 1594, 1622, 1623, 1630, 1629
770, 1588, 1589, 1596, 1595, 1623, 1624, 1631, 1630
771, 1589, 1590, 1597, 1596, 1624, 1625, 1632, 1631
772, 1590, 1591, 1598, 1597, 1625, 1626, 1633, 1632
773, 1591, 1592, 1599, 1598, 1626, 1627, 1634, 1633
774, 1592, 1593, 1600, 1599, 1627, 1628, 1635, 1634
775, 1594, 1595, 1602, 1601, 1629, 1630, 1637, 1636
776, 1595, 1596, 1603, 1602, 1630, 1631, 1638, 1637
777, 1596, 1597, 1604, 1603, 1631, 1632, 1639, 1638
778, 1597, 1598, 1605, 1604, 1632, 1633, 1640, 1639
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*ELEMENT, TYPE=C3D8I, ELSET=E_TIE_BLOCK
817, 1692, 1693, 1703, 1702, 1752, 1753, 1763, 1762
818, 1693, 1694, 1704, 1703, 1753, 1754, 1764, 1763
819, 1694, 1695, 1705, 1704, 1754, 1755, 1765, 1764
820, 1695, 1696, 1706, 1705, 1755, 1756, 1766, 1765
821, 1696, 1697, 1707, 1706, 1756, 1757, 1767, 1766
822, 1697, 1698, 1708, 1707, 1757, 1758, 1768, 1767
823, 1698, 1699, 1709, 1708, 1758, 1759, 1769, 1768
824, 1699, 1700, 1710, 1709, 1759, 1760, 1770, 1769
825, 1700, 1701, 1711, 1710, 1760, 1761, 1771, 1770
826, 1702, 1703, 1713, 1712, 1762, 1763, 1773, 1772
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*NSET, NSET=A_GAP_FIX
1, 2, 3, 4, 5, 6, 7, 8, 9, 10, 11, 12, 13, 14, 15, 16,
17, 18, 19, 20, 21, 22, 23, 24, 25, 26, 27, 28, 29, 30, 31, 32,
33, 34, 35, 36, 37, 38, 39, 40, 41, 42, 43, 44, 45, 46, 47, 48,
49, 50, 51, 52, 53, 54, 55, 56, 57, 58, 59, 60, 61, 62, 63, 64,
65, 66, 67, 68, 69, 70
*NSET, NSET=A_GAP_TOP
372, 373, 374, 375, 376, 377, 378, 379, 380, 381, 382, 383, 384, 385, 386, 387,
388, 389, 390, 391, 392, 393, 394, 395, 396, 397, 398, 399, 400, 401, 402, 403,
404, 405, 406, 407, 408, 409, 410, 411, 412, 413, 414, 415, 416, 417, 418, 419,
420, 421, 422, 423, 424, 425, 426, 427, 428, 429, 430, 431, 432, 433, 434, 435,
436, 437, 438, 439, 440, 441, 442, 443, 444, 445, 446, 447, 448
*NSET, NSET=B_SLIDE_FIX
449, 450, 451, 452, 453, 454, 455, 456, 457, 458, 459, 460, 461, 462, 463, 464,
465, 466, 467, 468, 469, 470, 471, 472, 473, 474, 475, 476, 477, 478, 479, 480,
481, 482, 483, 484, 485, 486, 487, 488, 489, 490, 491, 492, 493, 494, 495, 496,
497, 498, 499, 500, 501, 502, 503, 504, 505, 506, 507, 508, 509, 510, 511, 512,
513, 514, 515, 516, 517, 518
*NSET, NSET=B_SLIDE_TOP
778, 779, 780, 781, 782, 783, 784, 785, 786, 787, 788, 789, 790, 791, 792, 793,
794, 795, 796, 797, 798, 799, 800, 801, 802, 803, 804, 805, 806, 807, 808, 809,
810, 811, 812, 813, 814, 815, 816, 817, 818, 819, 820, 821, 822, 823, 824, 825,
826, 827, 828, 829, 830, 831, 832, 833, 834, 835, 836, 837, 838, 839, 840
*NSET, NSET=C_LIFT_FIX
841, 842, 843, 844, 845, 846, 847, 848, 849, 850, 851, 852, 853, 854, 855, 856,
857, 858, 859, 860, 861, 862, 863, 864, 865, 866, 867, 868, 869, 870, 871, 872,
873, 874, 875, 876, 877, 878, 879, 880, 881, 882, 883, 884, 885, 886, 887, 888,
889, 890, 891, 892, 893, 894, 895, 896, 897, 898, 899, 900, 901, 902, 903, 904,
905, 906, 907, 908, 909, 910
*NSET, NSET=C_LIFT_TOP
1212, 1213, 1214, 1215, 1216, 1217, 1218, 1219, 1220, 1221, 1222, 1223, 1224, 1225, 1226, 1227,
1228, 1229, 1230, 1231, 1232, 1233, 1234, 1235, 1236, 1237, 1238, 1239, 1240, 1241, 1242, 1243,
1244, 1245, 1246, 1247, 1248, 1249, 1250, 1251, 1252, 1253, 1254, 1255, 1256, 1257, 1258, 1259,
1260, 1261, 1262, 1263, 1264, 1265, 1266, 1267, 1268, 1269, 1270, 1271, 1272, 1273, 1274, 1275,
1276, 1277, 1278, 1279, 1280, 1281, 1282, 1283, 1284, 1285, 1286, 1287, 1288
*NSET, NSET=C_LIFT_REF
1289
*NSET, NSET=C_LIFT_ROT
1290
*NSET, NSET=D_LAM_FIX
1291, 1292, 1293, 1294, 1295, 1296, 1297, 1298, 1299, 1300, 1301, 1302, 1303, 1304, 1305, 1306,
1307, 1308, 1309, 1310, 1311, 1312, 1313, 1314, 1315, 1316, 1317, 1318, 1319, 1320, 1321, 1322,
1323, 1324, 1325, 1326, 1327, 1328, 1329, 1330, 1331, 1332, 1333, 1334, 1335, 1336, 1337, 1338
*NSET, NSET=D_LAM_HELD
1387, 1412, 1437, 1462, 1487, 1512, 1537, 1562
*NSET, NSET=D_LAM_END
1411, 1436, 1461, 1486, 1511, 1536, 1561, 1586
*NSET, NSET=E_TIE_FIX
1587, 1594, 1601, 1608, 1615, 1622, 1629, 1636, 1643, 1650, 1657, 1664, 1671, 1678, 1685
*NSET, NSET=E_TIE_END
1821, 1831, 1841, 1851, 1861, 1871
*SURFACE, NAME=A_GAP_MASTER
1, S2
2, S2
3, S2
4, S2
5, S2
6, S2
7, S2
8, S2
9, S2
10, S2
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*SURFACE, NAME=A_GAP_SLAVE
55, S1
56, S1
57, S1
58, S1
59, S1
60, S1
61, S1
62, S1
63, S1
64, S1
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*SURFACE, NAME=B_SLIDE_MASTER
235, S2
236, S2
237, S2
238, S2
239, S2
240, S2
241, S2
242, S2
243, S2
244, S2
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*SURFACE, NAME=B_SLIDE_SLAVE
289, S1
290, S1
291, S1
292, S1
293, S1
294, S1
295, S1
296, S1
297, S1
298, S1
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*SURFACE, NAME=C_LIFT_MASTER
433, S2
434, S2
435, S2
436, S2
437, S2
438, S2
439, S2
440, S2
441, S2
442, S2
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*SURFACE, NAME=C_LIFT_SLAVE
487, S1
488, S1
489, S1
490, S1
491, S1
492, S1
493, S1
494, S1
495, S1
496, S1
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*SURFACE, NAME=D_LAM_MASTER
667, S2
668, S2
669, S2
670, S2
671, S2
672, S2
673, S2
674, S2
675, S2
676, S2
677, S2
678, S2
679, S2
680, S2
681, S2
682, S2
683, S2
684, S2
685, S2
686, S2
687, S2
688, S2
689, S2
690, S2
691, S2
692, S2
693, S2
694, S2
695, S2
696, S2
*SURFACE, NAME=D_LAM_SLAVE
697, S1
698, S1
699, S1
700, S1
701, S1
702, S1
703, S1
704, S1
705, S1
706, S1
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*SURFACE, NAME=E_TIE_MASTER
793, S2
794, S2
795, S2
796, S2
797, S2
798, S2
799, S2
800, S2
801, S2
802, S2
803, S2
804, S2
805, S2
806, S2
807, S2
808, S2
809, S2
810, S2
811, S2
812, S2
813, S2
814, S2
815, S2
816, S2
*SURFACE, NAME=E_TIE_SLAVE
817, S1
818, S1
819, S1
820, S1
821, S1
822, S1
823, S1
824, S1
825, S1
826, S1
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*MATERIAL, NAME=STEEL
*ELASTIC
210000., 0.3
*SOLID SECTION, ELSET=A_GAP_PLATE, MATERIAL=STEEL
*SOLID SECTION, ELSET=A_GAP_BLOCK, MATERIAL=STEEL
*SOLID SECTION, ELSET=B_SLIDE_PLATE, MATERIAL=STEEL
*SOLID SECTION, ELSET=B_SLIDE_BLOCK, MATERIAL=STEEL
*SOLID SECTION, ELSET=C_LIFT_PLATE, MATERIAL=STEEL
*SOLID SECTION, ELSET=C_LIFT_BLOCK, MATERIAL=STEEL
*SOLID SECTION, ELSET=D_LAM_BOTTOM, MATERIAL=STEEL
*SOLID SECTION, ELSET=D_LAM_TOP, MATERIAL=STEEL
*SOLID SECTION, ELSET=E_TIE_BASE, MATERIAL=STEEL
*SOLID SECTION, ELSET=E_TIE_BLOCK, MATERIAL=STEEL
*RIGID BODY, NSET=C_LIFT_TOP, REF NODE=1289, ROT NODE=1290
*SURFACE INTERACTION, NAME=A_GAP
*SURFACE BEHAVIOR, PRESSURE-OVERCLOSURE=LINEAR
1000000., 0., 1.
*CONTACT PAIR, INTERACTION=A_GAP, TYPE=NODE TO SURFACE
A_GAP_SLAVE, A_GAP_MASTER
*SURFACE INTERACTION, NAME=B_SLIDE
*SURFACE BEHAVIOR, PRESSURE-OVERCLOSURE=LINEAR
1000000., 0., 1.
*FRICTION
0.3, 50000.
*CONTACT PAIR, INTERACTION=B_SLIDE, TYPE=NODE TO SURFACE
B_SLIDE_SLAVE, B_SLIDE_MASTER
*SURFACE INTERACTION, NAME=C_LIFT
*SURFACE BEHAVIOR, PRESSURE-OVERCLOSURE=LINEAR
1000000., 0., 1.
*CONTACT PAIR, INTERACTION=C_LIFT, TYPE=NODE TO SURFACE
C_LIFT_SLAVE, C_LIFT_MASTER
*SURFACE INTERACTION, NAME=D_LAM
*SURFACE BEHAVIOR, PRESSURE-OVERCLOSURE=LINEAR
1000000., 0., 1.
*CONTACT PAIR, INTERACTION=D_LAM, TYPE=NODE TO SURFACE
D_LAM_SLAVE, D_LAM_MASTER
*TIE, NAME=E_TIE, POSITION TOLERANCE=0.5
E_TIE_SLAVE, E_TIE_MASTER
*AMPLITUDE, NAME=PRESS
0., 0., 0.25, 1., 1., 1.
*AMPLITUDE, NAME=MOVE
0., 0., 0.25, 0., 1., 1.
*AMPLITUDE, NAME=HOLD
0., 0., 0.125, 1., 1., 1.
*AMPLITUDE, NAME=PEEL
0., 0., 0.125, 0., 1., 1.
*BOUNDARY
A_GAP_FIX, 1, 3
A_GAP_TOP, 1, 2
B_SLIDE_FIX, 1, 3
B_SLIDE_TOP, 2, 2
C_LIFT_FIX, 1, 3
C_LIFT_REF, 1, 2
C_LIFT_ROT, 1, 1
C_LIFT_ROT, 3, 3
D_LAM_FIX, 1, 3
D_LAM_HELD, 1, 2
E_TIE_FIX, 1, 3
*STEP, INC=200
*STATIC, DIRECT
0.125, 1.
*BOUNDARY
A_GAP_TOP, 3, 3, -0.3
*BOUNDARY, AMPLITUDE=PRESS
B_SLIDE_TOP, 3, 3, -0.02
*BOUNDARY, AMPLITUDE=MOVE
B_SLIDE_TOP, 1, 1, 0.04
*BOUNDARY, AMPLITUDE=PRESS
C_LIFT_REF, 3, 3, -0.01
*BOUNDARY, AMPLITUDE=MOVE
C_LIFT_ROT, 2, 2, 0.005
*BOUNDARY, AMPLITUDE=PEEL
D_LAM_END, 3, 3, 0.6
*CLOAD
1821, 3, -20.
1831, 3, -20.
1841, 3, -20.
1851, 3, -20.
1861, 3, -20.
1871, 3, -20.
*DLOAD, AMPLITUDE=HOLD
697, P2, 0.05
698, P2, 0.05
699, P2, 0.05
700, P2, 0.05
701, P2, 0.05
702, P2, 0.05
703, P2, 0.05
704, P2, 0.05
705, P2, 0.05
706, P2, 0.05
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*NODE FILE, CONTACT ELEMENTS
U
*EL FILE
S
*CONTACT FILE
CDIS, CSTR
*END STEP
