*HEADING
ccxview sample: *MODEL CHANGE and amplitudes (scripts/gen_modelchange.py)
*NODE, NSET=NALL
17, 80, 0, -20
18, 85, 0, -20
19, 90, 0, -20
20, 95, 0, -20
21, 100, 0, -20
38, 80, 5, -20
39, 85, 5, -20
40, 90, 5, -20
41, 95, 5, -20
42, 100, 5, -20
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*ELEMENT, TYPE=C3D8I, ELSET=EALL
1, 17, 18, 39, 38, 80, 81, 102, 101
2, 18, 19, 40, 39, 81, 82, 103, 102
3, 19, 20, 41, 40, 82, 83, 104, 103
4, 20, 21, 42, 41, 83, 84, 105, 104
5, 38, 39, 60, 59, 101, 102, 123, 122
6, 39, 40, 61, 60, 102, 103, 124, 123
7, 40, 41, 62, 61, 103, 104, 125, 124
8, 41, 42, 63, 62, 104, 105, 126, 125
9, 80, 81, 102, 101, 143, 144, 165, 164
10, 81, 82, 103, 102, 144, 145, 166, 165
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*ELSET, ELSET=EPROP
1, 2, 3, 4, 5, 6, 7, 8, 9, 10, 11, 12
13, 14, 15, 16, 17, 18, 19, 20, 21, 22, 23, 24
25, 26, 27, 28, 29, 30, 31, 32
*ELSET, ELSET=ETOP
73, 74, 75, 76, 77, 78, 79, 80, 81, 82, 83, 84
85, 86, 87, 88, 89, 90, 91, 92, 93, 94, 95, 96
97, 98, 99, 100, 101, 102, 103, 104, 105, 106, 107, 108
109, 110, 111, 112
*NSET, NSET=NFIX
253, 274, 295, 316, 337, 358, 379, 400, 421
*NSET, NSET=NGROUND
17, 18, 19, 20, 21, 38, 39, 40, 41, 42, 59, 60
61, 62, 63
*NSET, NSET=NTIP
399, 420, 441
*SURFACE, NAME=STOP, TYPE=ELEMENT
ETOP, S2
*MATERIAL, NAME=STEEL
*ELASTIC
210000., 0.3
*SOLID SECTION, ELSET=EALL, MATERIAL=STEEL
*AMPLITUDE, NAME=RAMP
0., 0., 1., 1.
*AMPLITUDE, NAME=GROW, TIME=TOTAL TIME
0., 0., 1., 0.5, 2., 1., 3., 1.
*BOUNDARY
NFIX, 1, 3
NGROUND, 1, 3
*STEP, NLGEOM
*STATIC, DIRECT
0.25, 1.
*CLOAD, AMPLITUDE=RAMP
NTIP, 3, -500.
*DSLOAD, AMPLITUDE=GROW
STOP, P, 2.
*NODE FILE
U
*EL FILE
S
*END STEP
*STEP, NLGEOM
*STATIC, DIRECT
0.5, 1.
*MODEL CHANGE, TYPE=ELEMENT, REMOVE
EPROP
*NODE FILE
U
*EL FILE
S
*END STEP
*STEP, NLGEOM
*STATIC, DIRECT
1., 1.
*MODEL CHANGE, TYPE=ELEMENT, ADD=STRAIN FREE
EPROP
*NODE FILE
U
*EL FILE
S
*END STEP
