*HEADING
ccxview sample: a submodel of modelchange.inp (scripts/gen_modelchange.py)
*NODE, NSET=NALL
10001, 0, 0, 0
10002, 2.5, 0, 0
10003, 5, 0, 0
10004, 7.5, 0, 0
10005, 10, 0, 0
10006, 12.5, 0, 0
10007, 15, 0, 0
10008, 17.5, 0, 0
10009, 20, 0, 0
10010, 0, 2.5, 0
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*ELEMENT, TYPE=C3D8I, ELSET=EALL
10001, 10001, 10002, 10011, 10010, 10046, 10047, 10056, 10055
10002, 10002, 10003, 10012, 10011, 10047, 10048, 10057, 10056
10003, 10003, 10004, 10013, 10012, 10048, 10049, 10058, 10057
10004, 10004, 10005, 10014, 10013, 10049, 10050, 10059, 10058
10005, 10005, 10006, 10015, 10014, 10050, 10051, 10060, 10059
10006, 10006, 10007, 10016, 10015, 10051, 10052, 10061, 10060
10007, 10007, 10008, 10017, 10016, 10052, 10053, 10062, 10061
10008, 10008, 10009, 10018, 10017, 10053, 10054, 10063, 10062
10009, 10010, 10011, 10020, 10019, 10055, 10056, 10065, 10064
10010, 10011, 10012, 10021, 10020, 10056, 10057, 10066, 10065
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*NSET, NSET=NFIX
10001, 10010, 10019, 10028, 10037, 10046, 10055, 10064, 10073, 10082, 10091, 10100
10109, 10118, 10127, 10136, 10145, 10154, 10163, 10172, 10181, 10190, 10199, 10208
10217
*NSET, NSET=NCUT
10009, 10018, 10027, 10036, 10045, 10054, 10063, 10072, 10081, 10090, 10099, 10108
10117, 10126, 10135, 10144, 10153, 10162, 10171, 10180, 10189, 10198, 10207, 10216
10225
*ELSET, ELSET=ECUT
10008, 10016, 10024, 10032, 10040, 10048, 10056, 10064, 10072, 10080, 10088, 10096
10104, 10112, 10120, 10128
*ELSET, ELSET=ETOP
10097, 10098, 10099, 10100, 10101, 10102, 10103, 10104, 10105, 10106, 10107, 10108
10109, 10110, 10111, 10112, 10113, 10114, 10115, 10116, 10117, 10118, 10119, 10120
10121, 10122, 10123, 10124, 10125, 10126, 10127, 10128
*SURFACE, NAME=SCUT, TYPE=ELEMENT
ECUT, S4
*SURFACE, NAME=STOP, TYPE=ELEMENT
ETOP, S2
*MATERIAL, NAME=STEEL
*ELASTIC
210000., 0.3
*SOLID SECTION, ELSET=EALL, MATERIAL=STEEL
*AMPLITUDE, NAME=RAMP
0., 0., 1., 1.
*AMPLITUDE, NAME=GROW, TIME=TOTAL TIME
0., 0., 1., 0.5, 2., 1., 3., 1.
*SUBMODEL, TYPE=NODE, INPUT=modelchange.frd
NCUT
*ELSET, ELSET=EGLOBAL
1, 2, 3, 4, 5, 6, 7, 8, 9, 10, 11, 12
13, 14, 15, 16, 17, 18, 19, 20, 21, 22, 23, 24
25, 26, 27, 28, 29, 30, 31, 32, 33, 34, 35, 36
37, 38, 39, 40, 41, 42, 43, 44, 45, 46, 47, 48
49, 50, 51, 52, 53, 54, 55, 56, 57, 58, 59, 60
61, 62, 63, 64, 65, 66, 67, 68, 69, 70, 71, 72
73, 74, 75, 76, 77, 78, 79, 80, 81, 82, 83, 84
85, 86, 87, 88, 89, 90, 91, 92, 93, 94, 95, 96
97, 98, 99, 100, 101, 102, 103, 104, 105, 106, 107, 108
109, 110, 111, 112
*SUBMODEL, TYPE=SURFACE, INPUT=modelchange.frd, GLOBAL ELSET=EGLOBAL
SCUT
*BOUNDARY
NFIX, 1, 3
*STEP
*STATIC
*BOUNDARY, SUBMODEL, STEP=1
NCUT, 1, 3
*DSLOAD, AMPLITUDE=GROW
STOP, P, 2.
*NODE FILE
U, RF
*EL FILE
S, E
*END STEP
*STEP
*STATIC
*BOUNDARY, OP=NEW
NFIX, 1, 3
*DSLOAD, SUBMODEL, STEP=1
SCUT, P
*NODE FILE
U, RF
*EL FILE
S, E
*END STEP
