*HEADING
ccxview sample: S8R concrete slab 4 x 4 m, simply supported, 20 kPa
*NODE, NSET=NALL
1, 0, 0, 0
2, 166.667, 0, 0
3, 333.333, 0, 0
4, 500, 0, 0
5, 666.667, 0, 0
6, 833.333, 0, 0
7, 1000, 0, 0
8, 1166.67, 0, 0
9, 1333.33, 0, 0
10, 1500, 0, 0
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*ELEMENT, TYPE=S8R, ELSET=SLAB
1, 1, 3, 41, 39, 2, 27, 40, 26
2, 3, 5, 43, 41, 4, 28, 42, 27
3, 5, 7, 45, 43, 6, 29, 44, 28
4, 7, 9, 47, 45, 8, 30, 46, 29
5, 9, 11, 49, 47, 10, 31, 48, 30
6, 11, 13, 51, 49, 12, 32, 50, 31
7, 13, 15, 53, 51, 14, 33, 52, 32
8, 15, 17, 55, 53, 16, 34, 54, 33
9, 17, 19, 57, 55, 18, 35, 56, 34
10, 19, 21, 59, 57, 20, 36, 58, 35
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*NSET, NSET=EDGES
1,
2,
3,
4,
5,
6,
7,
8,
9,
10,
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*MATERIAL, NAME=CONCRETE
*ELASTIC
30000, 0.2
*SHELL SECTION, ELSET=SLAB, MATERIAL=CONCRETE
200
*BOUNDARY
EDGES, 3
1, 1, 2
25, 2
*STEP
*STATIC
*DLOAD
SLAB, P, -0.02
*NODE FILE
U
*EL FILE
S
*END STEP
