*HEADING
ccxview symbols: every support, load, thermal load and constraint, one tile each
*NODE, NSET=NALL
1, 0, 0, 0
2, 10, 0, 0
3, 10, 10, 0
4, 0, 10, 0
5, 0, 0, 10
6, 10, 0, 10
7, 10, 10, 10
8, 0, 10, 10
9, 25, 0, 0
10, 35, 0, 0
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*ELEMENT, TYPE=C3D8, ELSET=S1_HELD
1, 1, 2, 3, 4, 5, 6, 7, 8
*ELEMENT, TYPE=S4, ELSET=S2_HELD_ROTATIONS
2, 9, 10, 11, 12
*ELEMENT, TYPE=C3D8, ELSET=S3_PRESCRIBED_DISPLACEMENT
3, 13, 14, 15, 16, 17, 18, 19, 20
*ELEMENT, TYPE=S4, ELSET=S4_PRESCRIBED_ROTATION
4, 21, 22, 23, 24
*ELEMENT, TYPE=C3D8, ELSET=S5_HELD_TEMPERATURE
5, 25, 26, 27, 28, 29, 30, 31, 32
*ELEMENT, TYPE=C3D8, ELSET=S6_CYLINDRICAL_TRANSFORM
6, 33, 34, 35, 36, 37, 38, 39, 40
*ELEMENT, TYPE=C3D8, ELSET=L1_FORCE
7, 41, 42, 43, 44, 45, 46, 47, 48
*ELEMENT, TYPE=B31, ELSET=L2_MOMENT
8, 49, 50
9, 50, 51
*ELEMENT, TYPE=C3D8, ELSET=L3_PRESSURE
10, 52, 53, 54, 55, 56, 57, 58, 59
*ELEMENT, TYPE=C3D8, ELSET=L4_SURFACE_PRESSURE
11, 60, 61, 62, 63, 64, 65, 66, 67
*ELEMENT, TYPE=S4, ELSET=L5_SHELL_EDGE_LOAD
12, 68, 69, 70, 71
*ELEMENT, TYPE=CPS4, ELSET=L6_PLANE_EDGE_PRESSURE
13, 72, 73, 74, 75
*ELEMENT, TYPE=C3D8, ELSET=L7_GRAVITY
14, 76, 77, 78, 79, 80, 81, 82, 83
*ELEMENT, TYPE=C3D8, ELSET=L8_CENTRIFUGAL
15, 84, 85, 86, 87, 88, 89, 90, 91
*ELEMENT, TYPE=C3D8, ELSET=L9_GRAVITY_SIDEWAYS
16, 92, 93, 94, 95, 96, 97, 98, 99
*ELEMENT, TYPE=C3D8, ELSET=L10_BOLT
17, 100, 101, 102, 103, 104, 105, 106, 107
18, 104, 105, 106, 107, 108, 109, 110, 111
*ELEMENT, TYPE=C3D8, ELSET=L11_BOLT
19, 113, 114, 115, 116, 117, 118, 119, 120
20, 117, 118, 119, 120, 121, 122, 123, 124
*ELEMENT, TYPE=C3D8, ELSET=L12_BOLT_IN_BLOCK
21, 126, 138, 141, 129, 127, 139, 142, 130
22, 127, 139, 142, 130, 128, 140, 143, 131
23, 129, 141, 144, 132, 130, 142, 145, 133
24, 130, 142, 145, 133, 131, 143, 146, 134
25, 132, 144, 147, 135, 133, 145, 148, 136
26, 133, 145, 148, 136, 134, 146, 149, 137
27, 138, 150, 153, 141, 139, 151, 154, 142
28, 139, 151, 154, 142, 140, 152, 155, 143
29, 141, 153, 156, 144, 142, 154, 157, 145
30, 142, 154, 157, 145, 143, 155, 158, 146
31, 144, 156, 159, 147, 145, 157, 160, 148
32, 145, 157, 160, 148, 146, 158, 161, 149
33, 150, 162, 165, 153, 151, 163, 166, 154
34, 151, 163, 166, 154, 152, 164, 167, 155
35, 153, 165, 168, 156, 154, 166, 169, 157
36, 154, 166, 169, 157, 155, 167, 170, 158
37, 156, 168, 171, 159, 157, 169, 172, 160
38, 157, 169, 172, 160, 158, 170, 173, 161
*ELEMENT, TYPE=C3D8, ELSET=T1_NODE_HEAT
39, 175, 176, 177, 178, 179, 180, 181, 182
*ELEMENT, TYPE=C3D8, ELSET=T2_SURFACE_HEAT
40, 183, 184, 185, 186, 187, 188, 189, 190
*ELEMENT, TYPE=C3D8, ELSET=T3_FILM
41, 191, 192, 193, 194, 195, 196, 197, 198
*ELEMENT, TYPE=C3D8, ELSET=T4_RADIATION
42, 199, 200, 201, 202, 203, 204, 205, 206
*ELEMENT, TYPE=C3D8, ELSET=T5_GIVEN_TEMPERATURE
43, 207, 208, 209, 210, 211, 212, 213, 214
*ELEMENT, TYPE=C3D8, ELSET=T6_BODY_HEAT
44, 215, 216, 217, 218, 219, 220, 221, 222
*ELEMENT, TYPE=C3D8, ELSET=C1_RIGID_BODY
45, 223, 224, 225, 226, 227, 228, 229, 230
*ELEMENT, TYPE=C3D8, ELSET=C2_KINEMATIC_COUPLING
46, 232, 233, 234, 235, 236, 237, 238, 239
*ELEMENT, TYPE=C3D8, ELSET=C3_DISTRIBUTING_COUPLING
47, 241, 242, 243, 244, 245, 246, 247, 248
*ELEMENT, TYPE=C3D8, ELSET=C12_RIGID_BODY_ROT
48, 250, 251, 252, 253, 254, 255, 256, 257
*ELEMENT, TYPE=C3D8, ELSET=C4_EQUATION
49, 260, 261, 262, 263, 264, 265, 266, 267
*ELEMENT, TYPE=C3D8, ELSET=C5_MPC_BEAM
50, 268, 269, 270, 271, 272, 273, 274, 275
*ELEMENT, TYPE=C3D8, ELSET=C6_TIE
51, 276, 277, 278, 279, 280, 281, 282, 283
52, 284, 285, 286, 287, 288, 289, 290, 291
*ELEMENT, TYPE=C3D8, ELSET=C7_CONTACT
53, 292, 293, 294, 295, 296, 297, 298, 299
54, 300, 301, 302, 303, 304, 305, 306, 307
*ELEMENT, TYPE=SPRINGA, ELSET=C8_SPRING
55, 308, 312
57, 309, 313
59, 310, 314
60, 311, 315
*ELEMENT, TYPE=DASHPOTA, ELSET=C9_DASHPOT
56, 309, 313
*ELEMENT, TYPE=GAPUNI, ELSET=C10_GAP
58, 310, 314
*ELEMENT, TYPE=MASS, ELSET=C11_MASS
61, 315
*NSET, NSET=NTFIX
29, 30, 31, 32
*NSET, NSET=NCYL
33, 34, 35, 36, 37, 38, 39, 40
*NSET, NSET=NHOT
211, 212, 213, 214
*NSET, NSET=NRIGID
227, 228, 229, 230
*NSET, NSET=NRIGID2
254, 255, 256, 257
*MATERIAL, NAME=STEEL
*ELASTIC
210000., 0.3
*DENSITY
7.85e-9
*EXPANSION
1.2e-5
*CONDUCTIVITY
50.
*SPECIFIC HEAT
4.6e8
*SOLID SECTION, ELSET=C12_RIGID_BODY_ROT, MATERIAL=STEEL
*SOLID SECTION, ELSET=C1_RIGID_BODY, MATERIAL=STEEL
*SOLID SECTION, ELSET=C2_KINEMATIC_COUPLING, MATERIAL=STEEL
*SOLID SECTION, ELSET=C3_DISTRIBUTING_COUPLING, MATERIAL=STEEL
*SOLID SECTION, ELSET=C4_EQUATION, MATERIAL=STEEL
*SOLID SECTION, ELSET=C5_MPC_BEAM, MATERIAL=STEEL
*SOLID SECTION, ELSET=C6_TIE, MATERIAL=STEEL
*SOLID SECTION, ELSET=C7_CONTACT, MATERIAL=STEEL
*SOLID SECTION, ELSET=L10_BOLT, MATERIAL=STEEL
*SOLID SECTION, ELSET=L11_BOLT, MATERIAL=STEEL
*SOLID SECTION, ELSET=L12_BOLT_IN_BLOCK, MATERIAL=STEEL
*SOLID SECTION, ELSET=L1_FORCE, MATERIAL=STEEL
*SOLID SECTION, ELSET=L3_PRESSURE, MATERIAL=STEEL
*SOLID SECTION, ELSET=L4_SURFACE_PRESSURE, MATERIAL=STEEL
*SOLID SECTION, ELSET=L7_GRAVITY, MATERIAL=STEEL
*SOLID SECTION, ELSET=L8_CENTRIFUGAL, MATERIAL=STEEL
*SOLID SECTION, ELSET=L9_GRAVITY_SIDEWAYS, MATERIAL=STEEL
*SOLID SECTION, ELSET=S1_HELD, MATERIAL=STEEL
*SOLID SECTION, ELSET=S3_PRESCRIBED_DISPLACEMENT, MATERIAL=STEEL
*SOLID SECTION, ELSET=S5_HELD_TEMPERATURE, MATERIAL=STEEL
*SOLID SECTION, ELSET=S6_CYLINDRICAL_TRANSFORM, MATERIAL=STEEL
*SOLID SECTION, ELSET=T1_NODE_HEAT, MATERIAL=STEEL
*SOLID SECTION, ELSET=T2_SURFACE_HEAT, MATERIAL=STEEL
*SOLID SECTION, ELSET=T3_FILM, MATERIAL=STEEL
*SOLID SECTION, ELSET=T4_RADIATION, MATERIAL=STEEL
*SOLID SECTION, ELSET=T5_GIVEN_TEMPERATURE, MATERIAL=STEEL
*SOLID SECTION, ELSET=T6_BODY_HEAT, MATERIAL=STEEL
*SHELL SECTION, ELSET=L5_SHELL_EDGE_LOAD, MATERIAL=STEEL
1.
*SHELL SECTION, ELSET=S2_HELD_ROTATIONS, MATERIAL=STEEL
1.
*SHELL SECTION, ELSET=S4_PRESCRIBED_ROTATION, MATERIAL=STEEL
1.
*SOLID SECTION, ELSET=L6_PLANE_EDGE_PRESSURE, MATERIAL=STEEL
1.
*BEAM SECTION, ELSET=L2_MOMENT, MATERIAL=STEEL, SECTION=RECT
2., 2.
1., 0., 0.
*INITIAL CONDITIONS, TYPE=TEMPERATURE
NALL, 293.
*PHYSICAL CONSTANTS, ABSOLUTE ZERO=0., STEFAN BOLTZMANN=5.669e-11
*BOUNDARY
1, 1, 3
2, 1, 3
3, 1, 3
4, 1, 3
*BOUNDARY
9, 1, 6
10, 1, 6
*BOUNDARY
13, 1, 3
14, 1, 3
15, 1, 3
16, 1, 3
*BOUNDARY
21, 1, 6
24, 1, 6
*BOUNDARY
25, 1, 3
26, 1, 3
27, 1, 3
28, 1, 3
*BOUNDARY
NTFIX, 11, 11, 350.
*TRANSFORM, NSET=NCYL, TYPE=C
130.0, 5.0, 0., 130.0, 5.0, 1.
*BOUNDARY
33, 2, 3
34, 2, 3
35, 2, 3
36, 2, 3
33, 1, 1
*BOUNDARY
41, 1, 3
42, 1, 3
43, 1, 3
44, 1, 3
*BOUNDARY
49, 1, 6
*BOUNDARY
52, 1, 3
53, 1, 3
54, 1, 3
55, 1, 3
*BOUNDARY
60, 1, 3
61, 1, 3
62, 1, 3
63, 1, 3
*SURFACE, NAME=SPRESS
11, S2
11, S3
*BOUNDARY
68, 1, 6
71, 1, 6
*BOUNDARY
72, 1, 2
75, 1, 2
*BOUNDARY
76, 1, 3
77, 1, 3
78, 1, 3
79, 1, 3
*BOUNDARY
84, 1, 3
85, 1, 3
86, 1, 3
87, 1, 3
*BOUNDARY
92, 1, 3
93, 1, 3
94, 1, 3
95, 1, 3
*BOUNDARY
100, 1, 3
101, 1, 3
102, 1, 3
103, 1, 3
*BOUNDARY
108, 1, 3
109, 1, 3
110, 1, 3
111, 1, 3
*SURFACE, NAME=SCUT0
17, S2
*PRE-TENSION SECTION, SURFACE=SCUT0, NODE=112
0., 0., 1.
*BOUNDARY
113, 1, 3
114, 1, 3
115, 1, 3
116, 1, 3
*BOUNDARY
121, 1, 3
122, 1, 3
123, 1, 3
124, 1, 3
*SURFACE, NAME=SCUT1
19, S2
*PRE-TENSION SECTION, SURFACE=SCUT1, NODE=125
0., 0., 1.
*BOUNDARY
126, 1, 3
129, 1, 3
132, 1, 3
135, 1, 3
138, 1, 3
141, 1, 3
144, 1, 3
147, 1, 3
150, 1, 3
153, 1, 3
156, 1, 3
159, 1, 3
162, 1, 3
165, 1, 3
168, 1, 3
171, 1, 3
*SURFACE, NAME=SCUT2
29, S2
*PRE-TENSION SECTION, SURFACE=SCUT2, NODE=174
0., 0., 1.
*BOUNDARY
175, 1, 3
176, 1, 3
177, 1, 3
178, 1, 3
*BOUNDARY
183, 1, 3
184, 1, 3
185, 1, 3
186, 1, 3
*BOUNDARY
191, 1, 3
192, 1, 3
193, 1, 3
194, 1, 3
*BOUNDARY
199, 1, 3
200, 1, 3
201, 1, 3
202, 1, 3
*BOUNDARY
207, 1, 3
208, 1, 3
209, 1, 3
210, 1, 3
*BOUNDARY
215, 1, 3
216, 1, 3
217, 1, 3
218, 1, 3
*BOUNDARY
223, 1, 3
224, 1, 3
225, 1, 3
226, 1, 3
*RIGID BODY, NSET=NRIGID, REF NODE=231
*BOUNDARY
232, 1, 3
233, 1, 3
234, 1, 3
235, 1, 3
*SURFACE, NAME=SKIN
46, S2
*COUPLING, REF NODE=240, SURFACE=SKIN, CONSTRAINT NAME=KIN
*KINEMATIC
1, 3
*BOUNDARY
241, 1, 3
242, 1, 3
243, 1, 3
244, 1, 3
*SURFACE, NAME=SDIS
47, S2
*COUPLING, REF NODE=249, SURFACE=SDIS, CONSTRAINT NAME=DIS
*DISTRIBUTING
1, 3
*BOUNDARY
250, 1, 3
251, 1, 3
252, 1, 3
253, 1, 3
*RIGID BODY, NSET=NRIGID2, REF NODE=258, ROT NODE=259
*BOUNDARY
260, 1, 3
261, 1, 3
262, 1, 3
263, 1, 3
*BOUNDARY
268, 1, 3
269, 1, 3
270, 1, 3
271, 1, 3
*EQUATION
2
265, 3, 1., 272, 3, -1.
*MPC
BEAM, 266, 275
*BOUNDARY
276, 1, 3
277, 1, 3
278, 1, 3
279, 1, 3
*SURFACE, NAME=TIE_M
51, S2
*SURFACE, NAME=TIE_S
52, S1
*TIE, NAME=TIE1, POSITION TOLERANCE=0.1
TIE_S, TIE_M
*BOUNDARY
292, 1, 3
293, 1, 3
294, 1, 3
295, 1, 3
*BOUNDARY
300, 1, 2
301, 1, 2
302, 1, 2
303, 1, 2
304, 1, 2
305, 1, 2
306, 1, 2
307, 1, 2
*SURFACE, NAME=CON_M
53, S2
*SURFACE, NAME=CON_S, TYPE=NODE
300
301
302
303
*CONTACT PAIR, INTERACTION=TOUCH, TYPE=NODE TO SURFACE
CON_S, CON_M
*SURFACE INTERACTION, NAME=TOUCH
*SURFACE BEHAVIOR, PRESSURE-OVERCLOSURE=LINEAR
1.e4
*BOUNDARY
308, 1, 3
309, 1, 3
310, 1, 3
311, 1, 3
*BOUNDARY
312, 1, 2
313, 1, 2
314, 1, 2
315, 1, 2
*BOUNDARY
308, 11, 11, 293.
309, 11, 11, 293.
310, 11, 11, 293.
311, 11, 11, 293.
312, 11, 11, 293.
313, 11, 11, 293.
314, 11, 11, 293.
315, 11, 11, 293.
*SPRING, ELSET=C8_SPRING

100.
*DASHPOT, ELSET=C9_DASHPOT

1.
*GAP, ELSET=C10_GAP
5., 0., 0., 1.
*MASS, ELSET=C11_MASS
1.e-6
*STEP
*HEAT TRANSFER
1., 1.
*CFLUX
181, 11, 0.5
179, 11, -0.25
*DFLUX
40, S2, 0.02
40, S4, -0.01
*FILM
41, F2, 293., 0.001
41, F4, 293., 0.0005
*RADIATE
42, R2, 293., 0.8
*DFLUX
T6_BODY_HEAT, BF, 0.001
*NODE FILE
U, NT, RF
*EL FILE
S, E, HFL
*END STEP
*STEP
*STATIC
*CLOAD
11, 3, -2.
*BOUNDARY
17, 3, 3, 0.02
18, 3, 3, 0.02
19, 3, 3, 0.02
20, 3, 3, 0.02
*BOUNDARY
22, 5, 5, 0.002
23, 5, 5, 0.002
*CLOAD
37, 1, 5.
38, 1, 5.
39, 1, 5.
40, 1, 5.
*CLOAD
47, 1, 10.
48, 3, -5.
*CLOAD
51, 1, 2.
51, 5, 40.
51, 6, -20.
*DLOAD
10, P2, 1.
10, P4, 0.5
*DSLOAD
SPRESS, P, 0.8
*DLOAD
12, EDNOR2, 0.5
*DLOAD
13, P2, 0.5
*DLOAD
L7_GRAVITY, GRAV, 9810., 0., 0., -1.
*DLOAD
L8_CENTRIFUGAL, CENTRIF, 1.e4, 180.0, 35.0, 0., 0., 0., 1.
*DLOAD
L9_GRAVITY_SIDEWAYS, GRAV, 4000., 1., 0., 0.
*CLOAD
112, 1, 50.0
*CLOAD
125, 1, 100.0
*CLOAD
174, 1, 80.
*TEMPERATURE
NHOT, 393.
*CLOAD
231, 1, 5.
*CLOAD
240, 2, 5.
*CLOAD
249, 3, -5.
*CLOAD
259, 3, 30.
*CLOAD
265, 3, 5.
*CLOAD
290, 1, 5.
*DLOAD
54, P2, 0.2
*CLOAD
312, 3, 1.
313, 3, 1.
314, 3, 1.
315, 3, 1.
*NODE FILE
U, NT, RF
*EL FILE
S, E, HFL
*END STEP
*STEP
*STATIC
*BOUNDARY, FIXED
112, 1, 1
*CLOAD, OP=NEW
47, 1, -20.
*DLOAD
7, P2, 1.
*NODE FILE
U, NT, RF
*EL FILE
S, E, HFL
*END STEP
