*HEADING
ccxview sample: a block tied onto a base, its slave surface past the master's end
*NODE, NSET=NALL
1, 0, 0, -10
2, 5, 0, -10
3, 10, 0, -10
4, 15, 0, -10
5, 20, 0, -10
6, 25, 0, -10
7, 30, 0, -10
8, 35, 0, -10
9, 40, 0, -10
10, 0, 5, -10
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*ELEMENT, TYPE=C3D8I, ELSET=BASE
1, 1, 2, 11, 10, 46, 47, 56, 55
2, 2, 3, 12, 11, 47, 48, 57, 56
3, 3, 4, 13, 12, 48, 49, 58, 57
4, 4, 5, 14, 13, 49, 50, 59, 58
5, 5, 6, 15, 14, 50, 51, 60, 59
6, 6, 7, 16, 15, 51, 52, 61, 60
7, 7, 8, 17, 16, 52, 53, 62, 61
8, 8, 9, 18, 17, 53, 54, 63, 62
9, 10, 11, 20, 19, 55, 56, 65, 64
10, 11, 12, 21, 20, 56, 57, 66, 65
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*ELEMENT, TYPE=C3D8I, ELSET=BLOCK
65, 136, 137, 149, 148, 232, 233, 245, 244
66, 137, 138, 150, 149, 233, 234, 246, 245
67, 138, 139, 151, 150, 234, 235, 247, 246
68, 139, 140, 152, 151, 235, 236, 248, 247
69, 140, 141, 153, 152, 236, 237, 249, 248
70, 141, 142, 154, 153, 237, 238, 250, 249
71, 142, 143, 155, 154, 238, 239, 251, 250
72, 143, 144, 156, 155, 239, 240, 252, 251
73, 144, 145, 157, 156, 240, 241, 253, 252
74, 145, 146, 158, 157, 241, 242, 254, 253
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*NSET, NSET=NFIX
1, 10, 19, 28, 37, 46, 55, 64, 73, 82, 91, 100, 109, 118, 127
*NSET, NSET=NEND
147, 159, 171, 183, 195, 207, 219, 231, 243, 255, 267, 279, 291, 303, 315, 327,
339, 351, 363, 375, 387, 399, 411, 423, 435, 447, 459, 471, 483, 495, 507, 519
*SURFACE, NAME=BASE_TOP
33, S2
34, S2
35, S2
36, S2
37, S2
38, S2
39, S2
40, S2
41, S2
42, S2
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*SURFACE, NAME=BLOCK_BOTTOM
65, S1
66, S1
67, S1
68, S1
69, S1
70, S1
71, S1
72, S1
73, S1
74, S1
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*MATERIAL, NAME=STEEL
*ELASTIC
210000., 0.3
*SOLID SECTION, ELSET=BASE, MATERIAL=STEEL
*SOLID SECTION, ELSET=BLOCK, MATERIAL=STEEL
*TIE, NAME=GLUE, POSITION TOLERANCE=0.5
BLOCK_BOTTOM, BASE_TOP
*BOUNDARY
NFIX, 1, 3
*STEP
*STATIC
*CLOAD
147, 3, -50.
159, 3, -50.
171, 3, -50.
183, 3, -50.
195, 3, -50.
207, 3, -50.
219, 3, -50.
231, 3, -50.
243, 3, -50.
255, 3, -50.
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*NODE FILE
U
*EL FILE
S
*END STEP
