** pressure vessel: hemispherical head with a top nozzle (quarter model), from make_vessel.py
*HEADING
vessel with nozzle, ASME VIII-2 5-A linearization example
*NODE, NSET=NALL
1, 500.000000, 0.000000, 0.000000
2, 500.000000, 0.000000, 79.196402
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*ELEMENT, TYPE=C3D20R, ELSET=EALL
1, 1, 2, 3, 4, 5, 6, 7, 8, 9, 10, 11, 12, 13, 14, 15,
16, 17, 18, 19, 20
2, 5, 6, 7, 8, 21, 22, 23, 24, 13, 14, 15, 16, 25, 26, 27,
28, 29, 30, 31, 32
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*ELSET, ELSET=SHELL
1, 2, 3, 4, 5, 6
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*ELSET, ELSET=HEAD
961, 962, 963, 964, 965, 966
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*ELSET, ELSET=NOZZLE
1793, 1794, 1795, 1796, 1797, 1798
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*NSET, NSET=SYM_Z
1, 4, 5, 8, 12, 16
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*NSET, NSET=SYM_Y
1, 2, 3, 4, 9, 10
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*NSET, NSET=SYM_X
93, 94, 95, 96, 97, 98
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*SURFACE, NAME=INSIDE
1, S3
2, S3
3, S3
4, S3
5, S3
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2152, S3
*SURFACE, NAME=NOZZLE_END
2145, S4
2146, S4
2147, S4
2148, S4
2149, S4
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2176, S4
*MATERIAL, NAME=SA516-70
*ELASTIC
200000., 0.3
*DENSITY
7.85e-9
*SOLID SECTION, ELSET=EALL, MATERIAL=SA516-70
*BOUNDARY
SYM_Z, 3
SYM_Y, 2
SYM_X, 1
** design pressure
*STEP
*STATIC
0.25, 1.
*DLOAD, OP=NEW
INSIDE, P, 2.0
NOZZLE_END, P, -7.031250
*NODE FILE
U
*EL FILE
S
*NODE PRINT, NSET=SYM_Z, TOTALS=ONLY
RF
*END STEP
** hydrotest 1.25 x design
*STEP
*STATIC
0.5, 1.
*DLOAD, OP=NEW
INSIDE, P, 2.5
NOZZLE_END, P, -8.789062
*NODE FILE
U
*EL FILE
S
*NODE PRINT, NSET=SYM_Z, TOTALS=ONLY
RF
*END STEP
** design pressure + nozzle pull
*STEP
*STATIC
0.5, 1.
*DLOAD, OP=NEW
INSIDE, P, 2.0
NOZZLE_END, P, -17.578125
*NODE FILE
U
*EL FILE
S
*NODE PRINT, NSET=SYM_Z, TOTALS=ONLY
RF
*END STEP
